ORIGIN := 1
Xw := [0, 50]
Yw := [0, 30]
m := 5  # -число подобластей
X :=
    for i ∈ 1 .. cols(Xw)
        for j ∈ 1 .. cols(Xw)*cols(Yw)
            k ← trunc((j - 1)/cols(Yw)) + 1
            X[j] ← transpose(Xw)[k]
        V ← stack(V, transpose(Yw))
    for i ∈ 2 .. cols(Xw)*cols(Yw) + 1
        J[i - 1] ← V[i]
    augment(X, J)
SOD :=
    for i ∈ 1 .. 5
        for j ∈ 1 .. m
            S[i, 1] ← i
            S[i, 2] ← i
            S[i, 3] ← S[i, 2] + 4
            S[i, 4] ← S[i, 3] + 1
            S[i, 5] ← S[i, 4] - 4
    S
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X = [0, 0; 0, 30; 50, 0; 50, 30]
SOD = [1, 1, 5, 6, 2; 2, 2, 6, 7, 3; 3, 3, 7, 8, 4; 4, 4, 8, 9, 5; 5, 5, 9, 10, 6]
SOD := [1, 1, 5, 6, 2; 2, 2, 6, 7, 3; 3, 3, 7, 8, 4; 4, 5, 9, 10, 6; 5, 7, 11, 12, 8]
FX :=
    for i ∈ 1 .. m
        for j ∈ 1 .. 4
            FXS[i, j] ← X[:, 1][SOD[i, j + 1]]
            FXS[i, 5] ← FXS[i, 1]
            FXS[i, 6] ← sqrt(-1)
    FXS  # error: This array index is invalid for this array.
FY :=
    for i ∈ 1 .. m
        for j ∈ 1 .. 4
            FYS[i, j] ← X[:, 2][SOD[i, j + 1]]
            FYS[i, 5] ← FYS[i, 1]
            FYS[i, 6] ← sqrt(-1)
    FYS  # error: This array index is invalid for this array.
X = [0, 0; 0, 30; 50, 0; 50, 30]
Prog(M) :=
    k ← 1
    for i ∈ 1 .. rows(M)
        for j ∈ 1 .. cols(M)
            V[k] ← M[i, j]
            k ← k + 1
    V
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nodes := READPRN("nodes_test.txt")
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elements := READPRN("elements_test.txt")
m := rows(elements) = 100  # - число элементов
n := rows(nodes) = 121
ORIGIN := 1
FX :=
    for i ∈ 1 .. m
        for j ∈ 1 .. 4
            FX[i, j] ← nodes[:, 2][elements[i, j + 1]]
            FX[i, 4] ← FX[i, 1]
            FX[i, 5] ← FX[i, 1]
            FX[i, 6] ← sqrt(-1)
    FX
FY :=
    for i ∈ 1 .. m
        for j ∈ 1 .. 4
            FY[i, j] ← nodes[:, 3][elements[i, j + 1]]
            FY[i, 4] ← FY[i, 3] if j == 3
            FY[i, 5] ← FY[i, 1]
            FY[i, 6] ← sqrt(-1)
    FY
nodes = [
    1, 0, 0;
    2, 5, 0;
    3, 10, 0;
    4, 15, 0;
    5, 20, 0;
    6, 25, 0;
    7, 30, 0;
    8, 35, 0;
    9, 40, 0;
    10, 45, 0
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]
elements = [
    1, 1, 2, 13, 12;
    2, 2, 3, 14, 13;
    3, 3, 4, 15, 14;
    4, 4, 5, 16, 15;
    5, 5, 6, 17, 16;
    6, 6, 7, 18, 17;
    7, 7, 8, 19, 18;
    8, 8, 9, 20, 19;
    9, 9, 10, 21, 20;
    10, 10, 11, 22, 21
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]
Prog(M) :=
    k ← 1
    for i ∈ 1 .. rows(M)
        for j ∈ 1 .. cols(M)
            G[k] ← M[i, j]
            k ← k + 1
    G
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nodes1 := READPRN("nodes_test.txt")
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nodes1 = [
    1, 0, 0;
    2, 5, 0;
    3, 10, 0;
    4, 15, 0;
    5, 20, 0;
    6, 25, 0;
    7, 30, 0;
    8, 35, 0;
    9, 40, 0;
    10, 45, 0
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]
elements1 := READPRN("elements_test.txt")
m1 := rows(elements1) = 100  # - число элементов после удаления подобласти
rows(nodes1) = 121  # - число узлов после удаления подобласти
ORIGIN := 1
FX :=
    for i ∈ 1 .. m1
        for j ∈ 1 .. 4
            FX[i, j] ← nodes1[:, 2][elements1[i, j + 1]]
            FX[i, 4] ← FX[i, 1]
            FX[i, 5] ← FX[i, 1]
            FX[i, 6] ← sqrt(-1)
    FX
FY :=
    for i ∈ 1 .. m1
        for j ∈ 1 .. 4
            FY[i, j] ← nodes1[:, 3][elements1[i, j + 1]]
            FY[i, 4] ← FY[i, 3] if j == 3
            FY[i, 5] ← FY[i, 1]
            FY[i, 6] ← sqrt(-1)
    FY
nodes1 = [
    1, 0, 0;
    2, 5, 0;
    3, 10, 0;
    4, 15, 0;
    5, 20, 0;
    6, 25, 0;
    7, 30, 0;
    8, 35, 0;
    9, 40, 0;
    10, 45, 0
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]
elements1 = [
    1, 1, 2, 13, 12;
    2, 2, 3, 14, 13;
    3, 3, 4, 15, 14;
    4, 4, 5, 16, 15;
    5, 5, 6, 17, 16;
    6, 6, 7, 18, 17;
    7, 7, 8, 19, 18;
    8, 8, 9, 20, 19;
    9, 9, 10, 21, 20;
    10, 10, 11, 22, 21
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]
Prog(M) :=
    k ← 1
    for i ∈ 1 .. rows(M)
        for j ∈ 1 .. cols(M)
            G[k] ← M[i, j]
            k ← k + 1
    G
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FX =  # no stored result
FY =  # no stored result
global_stiffnes_matrix_block := READPRN("out_stiffness_matrix_block.txt")
global_stiffness_matrix := READPRN("out_stiffness_matrix.txt")
global_load_vector_block := READPRN("out_loads_vec_block.txt")
global_load_vector := READPRN("out_loads_vec.txt")
GSM := global_stiffness_matrix
GLV := global_load_vector
GSM =  # no stored result
GLV = [
    -1330.95; 0; -2661.9; 0; -2661.9; 0; -2661.9; 0; -2661.9; 0
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]
u := READPRN("u.txt")  # вектор перемещений, полученный с помощью PARDISO
|GSM| = Infinity
disp := GSM^-1*GLV
scale := 10
NEW_COORDS :=
    n ← rows(nodes)
    for i ∈ 1 .. n
        res[i, 2] ← nodes[i, 2] + scale*disp[2*i - 1]
        res[i, 3] ← nodes[i, 3] + scale*disp[2*i - 0]
        res[i, 1] ← i
    res
NEW_COORDS = [
    1, -4.77697, 2.10261;
    2, 0.280445, 1.83762;
    3, 5.43491, 1.61036;
    4, 10.681, 1.40091;
    5, 16.0205, 1.21165;
    6, 21.4516, 1.04672;
    7, 26.9698, 0.907557;
    8, 32.5678, 0.789003;
    9, 38.238, 0.66519;
    10, 43.9859, 0.49179
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]
disp = [
    -0.477697; 0.210261; -0.471956; 0.183762; -0.456509; 0.161036; -0.431902; 0.140091; -0.397955; 0.121165
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]
u = [
    -0.47805; 0.210887; -0.472307; 0.184325; -0.456855; 0.161531; -0.432237; 0.140515; -0.398269; 0.121518
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]
FXn :=
    for i ∈ 1 .. m1
        for j ∈ 1 .. 4
            FX[i, j] ← NEW_COORDS[:, 2][elements[i, j + 1]]
            FX[i, 4] ← FX[i, 1]
            FX[i, 5] ← FX[i, 1]
            FX[i, 6] ← sqrt(-1)
    FX
FYn :=
    for i ∈ 1 .. m1
        for j ∈ 1 .. 4
            FY[i, j] ← NEW_COORDS[:, 3][elements1[i, j + 1]]
            FY[i, 4] ← FY[i, 3] if j == 3
            FY[i, 5] ← FY[i, 1]
            FY[i, 6] ← sqrt(-1)
    FY
Prog(M) :=
    k ← 1
    for i ∈ 1 .. rows(M)
        for j ∈ 1 .. cols(M)
            G[k] ← M[i, j]
            k ← k + 1
    G
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nodes = [
    1, 0, 0;
    2, 5, 0;
    3, 10, 0;
    4, 15, 0;
    5, 20, 0;
    6, 25, 0;
    7, 30, 0;
    8, 35, 0;
    9, 40, 0;
    10, 45, 0
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]
NEW_COORDS = [
    1, -4.77697, 2.10261;
    2, 0.280445, 1.83762;
    3, 5.43491, 1.61036;
    4, 10.681, 1.40091;
    5, 16.0205, 1.21165;
    6, 21.4516, 1.04672;
    7, 26.9698, 0.907557;
    8, 32.5678, 0.789003;
    9, 38.238, 0.66519;
    10, 43.9859, 0.49179
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]
FX =  # no stored result
FXn =  # no stored result
FY =  # no stored result
FYn =  # no stored result
(|u[1]| - |u[3]|)/|u[1]|*100 = 1.20131
